*Heading
** Job name: nat_freq Model name: Model-1
** Generated by: Abaqus/CAE 2020
*Preprint, echo=NO, model=NO, history=NO, contact=NO
**
** PARTS
**
*Part, name=CB
*Node
      1,         -2.5,           0.
      2,          -2.,           0.
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*Element, type=B21
  1,   1,   2
  2,   2,   3
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*Nset, nset=_PickedSet2, internal, generate
   1,  101,    1
*Elset, elset=_PickedSet2, internal, generate
   1,  100,    1
** Section: Section-1  Profile: Profile-Circular
*Beam Section, elset=_PickedSet2, material=Material-1, temperature=GRADIENTS, section=CIRC
0.5
0.,0.,-1.
*End Part
**
**
** ASSEMBLY
**
*Assembly, name=Assembly
**
*Instance, name=CB-1, part=CB
*End Instance
**
*Nset, nset=_PickedSet4, internal, instance=CB-1
 1,
*End Assembly
**
** MATERIALS
**
*Material, name=Material-1
*Density
 1.2e-06,
*Elastic
70000., 0.3
** ----------------------------------------------------------------
**
** STEP: Step-1
**
*Step, name=Step-1, nlgeom=NO, perturbation
*Frequency, eigensolver=Lanczos, sim, acoustic coupling=on, normalization=mass
10, , , , ,
**
** BOUNDARY CONDITIONS
**
** Name: Fixed Type: Symmetry/Antisymmetry/Encastre
*Boundary
_PickedSet4, ENCASTRE
**
** OUTPUT REQUESTS
**
*Restart, write, frequency=0
**
** FIELD OUTPUT: F-Output-1
**
*Output, field, variable=PRESELECT
*End Step
